arcangle(radc, g, W) :=
    Q ← W - (g/(2*π*radc) + g/(2*π*(radc + g)))*360
    Q ← 45 if Q < 45
    Q
Ls(g, rm, W) :=
    arclen ← 0
    N ← floor(rm/g)
    for k ∈ 0 .. N - 1
        radm ← rm - g*k
        radc ← radm - g/2
        arcang ← arcangle(radc, g, 360/W)
        conang ← g*360/(2*π*radc)
        arclen ← arclen + arcang/360*radm*2*π
        Q[k] ← arcang/360*radm*2*π
    conlen ← N*π*g/2
    arclen + conlen
170/13.1 = 12.9771
Ls(13.1, 170, 4) = 1782.54
